// SBML level 2 version 4

model New_Model_1()

  // Compartments:
  compartment Intracellular = 1;

  // Species:
  species Glucose in Intracellular = 0;
  species Oxygen in Intracellular = 0;
  species Energy in Intracellular = 100;
  species Lactate in Intracellular = 0;
  species cycle_rate in Intracellular = 0; cycle_rate is "lactatesr";
  species apoptosis_rate in Intracellular = 0;
  species migration_speed in Intracellular = 0;

  // Parameters:
  k_aer = 0.5;
  k_ane = 0.1;
  k_usage = 5;
  oxygen_thresh = 0.1;

  // Reactions:
  Aerobic: Glucose + Oxygen => 38 Energy; Intracellular*k_aer*Glucose*Oxygen;
  Anaerobic: Glucose => 4 Energy + Lactate; Intracellular*k_ane*Glucose;
  Energy_Usage: Energy => ; Intracellular*k_usage*Energy;

  // Events:
  secrete_lactate: at (cycle_rate) after (Lactate > 0.01): cycle_rate = 0.01;
  die: at (Energy < 45): apoptosis_rate = 9e99;
  do_not_move: at (Oxygen > oxygen_thresh): migration_speed = 0;
  move: at (Oxygen < oxygen_thresh): migration_speed = 100;

  // Unit definitions:
  unit length = 1e-6 metre;
  unit area = (1e-6 metre)^2;
  unit volume = 1e-3 litre;
  unit time = 60 second;
  unit substance = 1e-3 mole;
end
