// SBML level 3 version 2

model main()

  // Compartments:
  compartment cell; cell is "Cell";

  // Species:
  species unbound_external_tnfr in cell = 5/cell; unbound_external_tnfr is "unbound_external_TNFR";
  species bound_external_tnfr in cell; bound_external_tnfr is "bound_external_TNFR";
  species bound_internal_tnfr in cell; bound_internal_tnfr is "bound_internal_TNFR";
  species tnf_uptake_rate in cell; tnf_uptake_rate is "TNF uptake rate";

  // Parameters:
  tnfr_binding_rate = 0.5; tnfr_binding_rate is "TNFR_binding_rate";
  tnfr_endocytosis_rate = 0.5; tnfr_endocytosis_rate is "TNFR_endocytosis_rate";
  tnfr_recycling_rate = 0.5; tnfr_recycling_rate is "TNFR_recycling_rate";

  // Assignment rules:
  tnf_uptake_rate := unbound_external_tnfr*tnfr_endocytosis_rate - bound_internal_tnfr*tnfr_recycling_rate;

  // Reactions:
  binding: unbound_external_tnfr => bound_external_tnfr; unbound_external_tnfr*tnfr_endocytosis_rate; binding is "Binding";
  endocytosis: bound_external_tnfr => bound_internal_tnfr; bound_external_tnfr*tnfr_endocytosis_rate; endocytosis is "Endocytosis";
  recycling: bound_internal_tnfr => unbound_external_tnfr; bound_internal_tnfr*tnfr_recycling_rate; recycling is "Recycling";
end
